! =================================================!
! ANSYS APDL-scripts - Verification
!    -----------------------------------------
!       Geometry: [m]
!       Force:    [N]
!       Moment:   [Nm]
!       Pressure: [Pa]
! =================================================!

FINISH		 ! Make sure current ANSYS module is closed
/CLEAR,START ! Clear the ANSYS workspace

! White background
/RGB,INDEX,100,100,100, 0
/RGB,INDEX, 80, 80, 80,13
/RGB,INDEX, 60, 60, 60,14
/RGB,INDEX, 0, 0, 0,15

! =================================================!
! INPUT DATA - including material
! =================================================!

PI = 4*ATAN(1.0) ! Define variable PI as 3.1415...

! Remember to update title
*dim,TITLE_TEXT,string,20 ! Maximum 20 characters
/TITLE,%TITLE_TEXT(1)% ADPL verification of composit bone

!Young and Poission
YOUNG_COMPACT = 19e9
POISSON_COMPACT = 0.4
YOUNG_SPONGY = 10e9
POISSON_SPONGY = 0.2
YOUNG_MARROW = 5e9 !Changed to imply a solid
POISSON_MARROW = 0.3

!Dimensions
TH = 0.035 !Thickness
!Max Stress on beam
M=30.34963218
I=(1/12)*TH**4
h=0.0175
sigmamax=(M/I)*(TH/2)

! =================================================!
! GEOMETRY DEFINITIONS - in preprocessor (/PREP7)
! =================================================!
/PREP7 ! Enter the preprocessor

!Keypoints
K,1,0,0,0
K,2,0.008,0,0
K,3,0.013,0,0
K,4,0.022,0,0
K,5,0.027,0,0
K,6,0.035,0,0
K,7,0,0.4225/2,0
K,8,0.008,0.4225/2,0
K,9,0.013,0.4225/2,0
K,10,0.022,0.4225/2,0
K,11,0.027,0.4225/2,0
K,12,0.035,0.4225/2,0
K,13,0,0.4225,0
K,14,0.008,0.4225,0
K,15,0.013,0.4225,0
K,16,0.022,0.4225,0
K,17,0.027,0.4225,0
K,18,0.035,0.4225,0

!Lines
L,1,2
L,2,8
L,8,7
L,7,1
L,2,3
L,3,9
L,9,8
L,3,4
L,4,10
L,10,9
L,4,5
L,5,11
L,11,10
L,5,6
L,6,12
L,12,11
L,7,8
L,8,14
L,14,13
L,13,7
L,8,9
L,9,15
L,15,14
L,14,8
L,9,10
L,10,16
L,16,15
L,15,9
L,10,11
L,11,17
L,17,16
L,16,10
L,11,12
L,12,18
L,18,17
L,17,11

!Area from lines
AL,1,2,3,4
AL,5,6,7,2
AL,8,9,10,6
AL,11,12,13,9
AL,14,15,16,12
AL,3,17,18,19
AL,7,20,21,17
AL,10,22,23,20
AL,13,24,25,22
AL,16,26,27,24

! =================================================!
! MATERIAL DEFINITIONS
! =================================================!

MP,EX,1,YOUNG_COMPACT
MP,PRXY,1,POISSON_COMPACT
MP,EX,2,YOUNG_SPONGY
MP,PRXY,2,POISSON_SPONGY
MP,EX,3,YOUNG_MARROW
MP,PRXY,3,POISSON_MARROW

! =================================================!
! ELEMENT DEFINITIONS AND MESHING
! =================================================!

!Initialized mesh size
Meshx=0.004

*ASK,TYPE,Select elementtype: 1=>Plane182(Q4 or CST) 2=>Plane182(Q6) 3=>Plane183(Q8 or LST)
!For CST, Q4
*IF,TYPE,EQ,1,THEN
ET,1,PLANE182
KEYOPT,1,3,3
R,1,TH,

!For Q6
*ELSEIF,TYPE,EQ,2,THEN
ET,1,PLANE182
KEYOPT,1,1,2
KEYOPT,1,3,3
R,1,TH,

!For LST, Q8
*ELSEIF,TYPE,EQ,3,THEN
ET,1,PLANE183
KEYOPT,1,3,3
R,1,TH,
*ENDIF

*ASK,Shape,Select triangular or quadrilateral: 1=>Triangular (CST or LST) 2=>Quadrilateral (Q4, Q6 or Q8)
!Compact Area 1 and 6
CM,_Y,AREA
ASEL,,,,1
CM,_Y1,AREA
CMSEL,S,_Y
CMSEL,S,_Y1
AATT,1,1,1,0,
CMSEL,S,_Y
CMDELE,_Y
CMDELE,_Y1
FLST,2,1,5,ORDE,1
FITEM,2,1
AESIZE,P51X,Meshx,
!Selecting shape of element
*IF,Shape,EQ,1,THEN
MSHAPE,1,2D
*ELSEIF,Shape,EQ,2,THEN
MSHAPE,0,2D
*ENDIF
MSHKEY,1
CM,_Y,AREA
ASEL,,,,1
CM,_Y1,AREA
CHKMSH,'AREA'
CMSEL,S,_Y
AMESH,_Y1
CMDELE,_Y
CMDELE,_Y1
CMDELE,_Y2

CM,_Y,AREA
ASEL,,,,6
CM,_Y1,AREA
CMSEL,S,_Y
CMSEL,S,_Y1
AATT,1,1,1,0,
CMSEL,S,_Y
CMDELE,_Y
CMDELE,_Y1
FLST,2,1,5,ORDE,1
FITEM,2,6
AESIZE,P51X,Meshx,
!Selecting shape of element
*IF,Shape,EQ,1,THEN
MSHAPE,1,2D
*ELSEIF,Shape,EQ,2,THEN
MSHAPE,0,2D
*ENDIF
MSHKEY,1
CM,_Y,AREA
ASEL,,,,6
CM,_Y1,AREA
CHKMSH,'AREA'
CMSEL,S,_Y
AMESH,_Y1
CMDELE,_Y
CMDELE,_Y1
CMDELE,_Y2

!Compact Area 5 and 10
CM,_Y,AREA
ASEL,,,,5
CM,_Y1,AREA
CMSEL,S,_Y
CMSEL,S,_Y1
AATT,1,1,1,0,
CMSEL,S,_Y
CMDELE,_Y
CMDELE,_Y1
FLST,2,1,5,ORDE,1
FITEM,2,5
AESIZE,P51X,Meshx,
!Selecting shape of element
*IF,Shape,EQ,1,THEN
MSHAPE,1,2D
*ELSEIF,Shape,EQ,2,THEN
MSHAPE,0,2D
*ENDIF
MSHKEY,1
CM,_Y,AREA
ASEL,,,,5
CM,_Y1,AREA
CHKMSH,'AREA'
CMSEL,S,_Y
AMESH,_Y1
CMDELE,_Y
CMDELE,_Y1
CMDELE,_Y2

CM,_Y,AREA
ASEL,,,,10
CM,_Y1,AREA
CMSEL,S,_Y
CMSEL,S,_Y1
AATT,1,1,1,0,
CMSEL,S,_Y
CMDELE,_Y
CMDELE,_Y1
FLST,2,1,5,ORDE,1
FITEM,2,10
AESIZE,P51X,Meshx,
!Selecting shape of element
*IF,Shape,EQ,1,THEN
MSHAPE,1,2D
*ELSEIF,Shape,EQ,2,THEN
MSHAPE,0,2D
*ENDIF
MSHKEY,1
CM,_Y,AREA
ASEL,,,,10
CM,_Y1,AREA
CHKMSH,'AREA'
CMSEL,S,_Y
AMESH,_Y1
CMDELE,_Y
CMDELE,_Y1
CMDELE,_Y2

!Spongy Area 2 and 7
CM,_Y,AREA
ASEL,,,,2
CM,_Y1,AREA
CMSEL,S,_Y
CMSEL,S,_Y1
AATT,2,1,1,0,
CMSEL,S,_Y
CMDELE,_Y
CMDELE,_Y1
FLST,2,1,5,ORDE,1
FITEM,2,2
AESIZE,P51X,Meshx,
!Selecting shape of element
*IF,Shape,EQ,1,THEN
MSHAPE,1,2D
*ELSEIF,Shape,EQ,2,THEN
MSHAPE,0,2D
*ENDIF
MSHKEY,1
CM,_Y,AREA
ASEL,,,,2
CM,_Y1,AREA
CHKMSH,'AREA'
CMSEL,S,_Y
AMESH,_Y1
CMDELE,_Y
CMDELE,_Y1
CMDELE,_Y2

CM,_Y,AREA
ASEL,,,,7
CM,_Y1,AREA
CMSEL,S,_Y
CMSEL,S,_Y1
AATT,2,1,1,0,
CMSEL,S,_Y
CMDELE,_Y
CMDELE,_Y1
FLST,2,1,5,ORDE,1
FITEM,2,7
AESIZE,P51X,Meshx,
!Selecting shape of element
*IF,Shape,EQ,1,THEN
MSHAPE,1,2D
*ELSEIF,Shape,EQ,2,THEN
MSHAPE,0,2D
*ENDIF
MSHKEY,1
CM,_Y,AREA
ASEL,,,,7
CM,_Y1,AREA
CHKMSH,'AREA'
CMSEL,S,_Y
AMESH,_Y1
CMDELE,_Y
CMDELE,_Y1
CMDELE,_Y2

!Spongy Area 4 and 9
CM,_Y,AREA
ASEL,,,,4
CM,_Y1,AREA
CMSEL,S,_Y
CMSEL,S,_Y1
AATT,2,1,1,0,
CMSEL,S,_Y
CMDELE,_Y
CMDELE,_Y1
FLST,2,1,5,ORDE,1
FITEM,2,4
AESIZE,P51X,Meshx,
!Selecting shape of element
*IF,Shape,EQ,1,THEN
MSHAPE,1,2D
*ELSEIF,Shape,EQ,2,THEN
MSHAPE,0,2D
*ENDIF
MSHKEY,1
CM,_Y,AREA
ASEL,,,,4
CM,_Y1,AREA
CHKMSH,'AREA'
CMSEL,S,_Y
AMESH,_Y1
CMDELE,_Y
CMDELE,_Y1
CMDELE,_Y2

CM,_Y,AREA
ASEL,,,,9
CM,_Y1,AREA
CMSEL,S,_Y
CMSEL,S,_Y1
AATT,2,1,1,0,
CMSEL,S,_Y
CMDELE,_Y
CMDELE,_Y1
FLST,2,1,5,ORDE,1
FITEM,2,9
AESIZE,P51X,Meshx,
!Selecting shape of element
*IF,Shape,EQ,1,THEN
MSHAPE,1,2D
*ELSEIF,Shape,EQ,2,THEN
MSHAPE,0,2D
*ENDIF
MSHKEY,1
CM,_Y,AREA
ASEL,,,,9
CM,_Y1,AREA
CHKMSH,'AREA'
CMSEL,S,_Y
AMESH,_Y1
CMDELE,_Y
CMDELE,_Y1
CMDELE,_Y2

!Marrow area 3 and 8
CM,_Y,AREA
ASEL,,,,3
CM,_Y1,AREA
CMSEL,S,_Y
CMSEL,S,_Y1
AATT,3,1,1,0,
CMSEL,S,_Y
CMDELE,_Y
CMDELE,_Y1
FLST,2,1,5,ORDE,1
FITEM,2,3
AESIZE,P51X,Meshx,
!Selecting shape of element
*IF,Shape,EQ,1,THEN
MSHAPE,1,2D
*ELSEIF,Shape,EQ,2,THEN
MSHAPE,0,2D
*ENDIF
MSHKEY,1
CM,_Y,AREA
ASEL,,,,3
CM,_Y1,AREA
CHKMSH,'AREA'
CMSEL,S,_Y
AMESH,_Y1
CMDELE,_Y
CMDELE,_Y1
CMDELE,_Y2

CM,_Y,AREA
ASEL,,,,8
CM,_Y1,AREA
CMSEL,S,_Y
CMSEL,S,_Y1
AATT,3,1,1,0,
CMSEL,S,_Y
CMDELE,_Y
CMDELE,_Y1
FLST,2,1,5,ORDE,1
FITEM,2,8
AESIZE,P51X,Meshx,
!Selecting shape of element
*IF,Shape,EQ,1,THEN
MSHAPE,1,2D
*ELSEIF,Shape,EQ,2,THEN
MSHAPE,0,2D
*ENDIF
MSHKEY,1
CM,_Y,AREA
ASEL,,,,8
CM,_Y1,AREA
CHKMSH,'AREA'
CMSEL,S,_Y
AMESH,_Y1
CMDELE,_Y
CMDELE,_Y1
CMDELE,_Y2

! =================================================!
! DEFINE BOUNDARY CONDITIONS AND LOADS
! =================================================!

!Clamped
SELTOL,1E-6
NSEL,S,LOC,Y,0
D,ALL,,,,,,ALL
NSEL,ALL

!Force
SELTOL,1E-6
NSEL,S,LOC,Y,0.4225
*GET,tnum,NODE,0,COUNT,,,
F,ALL,FX,72.66/tnum
NSEL,ALL

!Moments pressure
SELTOL,1E-6
NSEL,S,LOC,Y,0.4225
NSEL,R,LOC,X,0
F,ALL,Fy,-M/TH
NSEL,ALL
SELTOL,1E-6
NSEL,S,LOC,Y,0.4225
NSEL,R,LOC,X,TH
F,ALL,Fy,M/TH
NSEL,ALL

FINISH! Exit the preprocessor

! =================================================!
! SOLUTION - in solution (/SOL)
! =================================================!

/SOL	! Enter the solution module
SOLVE	! Obtain solution

FINISH	! Exit the solution module

! =================================================!
! STUDY RESULTS - in postprocessor (/POST1)
! =================================================!

!Plane Stress plot in x direction
/POST1
SET,FIRST
/EFACET,1
PLNSOL,S,EQV,0,1.0

!Element stress
SELTOL,1E-6
NSEL,S,LOC,Y,0.4225/2
NSEL,R,LOC,X,0.035
NSORT,S,Y,,1
*GET,Maxstress,SORT,,MAX
NSEL,ALL

FINISH
